*Heading
** Job name: Job-qiu-ban Model name: Model-1
** Generated by: Abaqus/CAE 2016
*Preprint, echo=NO, model=NO, history=NO, contact=NO
**
** PARTS
**
*Part, name=Part-ban
*Node
      1,           0.,         -15.,           0.
      2,           0.,         -15.,          40.
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*Element, type=C3D8R
   1,  773,  774, 3103, 2789,   13,   14,  274,  273
   2,  774,  775, 3104, 3103,   14,   15,  275,  274
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*Nset, nset=Set-1, generate
    1,  7578,     1
*Elset, elset=Set-1, generate
    1,  6320,     1
** Section: Section-1
*Solid Section, elset=Set-1, material=Material-1
,
*End Part
**
*Part, name=Part-qiu
*Node
      1,           0.,           5.,           5.
      2,           0.,           0.,           0.
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*Element, type=C3D8R
  1,  420,  421, 1671, 1552,   14,   15,  173,  172
  2,  421,  422, 1672, 1671,   15,   16,  174,  173
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*Nset, nset=Set-1, generate
    1,  4203,     1
*Elset, elset=Set-1, generate
    1,  3584,     1
** Section: Section-1
*Solid Section, elset=Set-1, material=Material-1
,
*End Part
**
**
** ASSEMBLY
**
*Assembly, name=Assembly
**
*Instance, name=Part-ban-1, part=Part-ban
*End Instance
**
*Instance, name=Part-qiu-1, part=Part-qiu
*End Instance
**
*Nset, nset=Set-Fix, instance=Part-ban-1
    2,    3,    4,    6,    7,    8
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*Elset, elset=Set-Fix, instance=Part-ban-1
  965,  970,  975,  980,  985,  990
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*Nset, nset=Set-Symm, instance=Part-ban-1
    1,    3,    5,    6,    7,    8
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*Nset, nset=Set-Symm, instance=Part-qiu-1
    2,    3,    4,    5,    6,   46
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*Elset, elset=Set-Symm, instance=Part-ban-1
    1,    2,    3,    4,    5,    6
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*Elset, elset=Set-Symm, instance=Part-qiu-1
  136,  144,  152,  160,  168,  176
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*Nset, nset=Set-qiu, instance=Part-qiu-1, generate
    1,  4203,     1
*Elset, elset=Set-qiu, instance=Part-qiu-1, generate
    1,  3584,     1
*Elset, elset=_Surf-ban_S4, internal, instance=Part-ban-1
 1884, 1888, 1892, 1896, 1900, 1904
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*Elset, elset=_Surf-ban_S3, internal, instance=Part-ban-1
 1581, 1582, 1583, 1584, 1585, 1601
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*Elset, elset=_Surf-ban_S2, internal, instance=Part-ban-1
 2841, 2842, 2843, 2844, 2845, 2846
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*Surface, type=ELEMENT, name=Surf-ban
_Surf-ban_S4, S4
_Surf-ban_S3, S3
_Surf-ban_S2, S2
*Elset, elset=_Surf-qiu_S2, internal, instance=Part-qiu-1
    1,    2,    3,    4,    5,    6
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*Elset, elset=_Surf-qiu_S3, internal, instance=Part-qiu-1
  897,  898,  899,  900,  901,  902
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*Elset, elset=_Surf-qiu_S4, internal, instance=Part-qiu-1
 1538, 1540, 1542, 1544, 1546, 1548
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*Surface, type=ELEMENT, name=Surf-qiu
_Surf-qiu_S2, S2
_Surf-qiu_S3, S3
_Surf-qiu_S4, S4
*End Assembly
**
** MATERIALS
**
*Material, name=Material-1
*Density
 7.8e-09,
*Elastic
210000., 0.3
**
** INTERACTION PROPERTIES
**
*Surface Interaction, name=IntProp-1
*Friction
0.,
**
** BOUNDARY CONDITIONS
**
** Name: BC-Fix Type: Symmetry/Antisymmetry/Encastre
*Boundary
Set-Fix, ENCASTRE
** Name: BC-Symm Type: Symmetry/Antisymmetry/Encastre
*Boundary
Set-Symm, ZSYMM
**
** PREDEFINED FIELDS
**
** Name: Predefined Field-1   Type: Velocity
*Initial Conditions, type=VELOCITY
Set-qiu, 1, 600.
Set-qiu, 2, -2500.
Set-qiu, 3, 0.
** ----------------------------------------------------------------
**
** STEP: Step-1
**
*Step, name=Step-1, nlgeom=YES
*Dynamic, Explicit
, 0.0025
*Bulk Viscosity
0.06, 0.03
**
** INTERACTIONS
**
** Interaction: Int-1
*Contact Pair, interaction=IntProp-1, mechanical constraint=KINEMATIC, cpset=Int-1
Surf-qiu, Surf-ban
**
** OUTPUT REQUESTS
**
*Restart, write, number interval=1, time marks=NO
**
** FIELD OUTPUT: F-Output-1
**
*Output, field
*Node Output
A, AR, AT, CF, RF, RM, RT, U
UR, UT, V, VR, VT
*Element Output, directions=YES
BF, EVF, GRAV, HP, IWCONWEP, LE, NFORC, NFORCSO, P, PE, PEEQ, PEEQVAVG, PEVAVG, S, SBF, SF
STAGP, SVAVG, TRNOR, TRSHR, VP
*Contact Output
CSTRESS,
**
** HISTORY OUTPUT: H-Output-1
**
*Output, history, variable=PRESELECT
*End Step
