*Heading
** Job name: Job-cailiao-2 Model name: Model-1
** Generated by: Abaqus/CAE 2016
*Preprint, echo=NO, model=NO, history=NO, contact=NO
**
** PARTS
**
*Part, name=Part-liang
*Node
      1,          50.,           5.,           5.
      2,          50.,           4.,           5.
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*Element, type=C3D8R
   1,   37,   38,   44,   43,    1,    2,    8,    7
   2,   38,   39,   45,   44,    2,    3,    9,    8
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*Nset, nset=Set-1, generate
    1,  1836,     1
*Elset, elset=Set-1, generate
    1,  1250,     1
** Section: Section-1
*Solid Section, elset=Set-1, material=Material-1
,
*End Part
**
**
** ASSEMBLY
**
*Assembly, name=Assembly
**
*Instance, name=Part-liang-1, part=Part-liang
*End Instance
**
*Nset, nset=Set-Fix, instance=Part-liang-1, generate
 1801,  1836,     1
*Elset, elset=Set-Fix, instance=Part-liang-1, generate
 1226,  1250,     1
*Elset, elset=_Surf-L_S6, internal, instance=Part-liang-1, generate
    1,  1246,     5
*Surface, type=ELEMENT, name=Surf-L
_Surf-L_S6, S6
*Elset, elset=_Surf-S_S2, internal, instance=Part-liang-1, generate
  1,  25,   1
*Surface, type=ELEMENT, name=Surf-S
_Surf-S_S2, S2
*End Assembly
**
** MATERIALS
**
*Material, name=Material-1
*Elastic
210000., 0.3
*Plastic
380.,0.
**
** BOUNDARY CONDITIONS
**
** Name: BC-Fix Type: Displacement/Rotation
*Boundary
Set-Fix, 1, 1
Set-Fix, 2, 2
Set-Fix, 3, 3
** ----------------------------------------------------------------
**
** STEP: Step-L
**
*Step, name=Step-L, nlgeom=NO
*Static
1., 1., 1e-05, 1.
**
** LOADS
**
** Name: Load-L   Type: Pressure
*Dsload
Surf-L, P, 10.
**
** OUTPUT REQUESTS
**
*Restart, write, frequency=0
**
** FIELD OUTPUT: F-Output-1
**
*Output, field, variable=PRESELECT
**
** HISTORY OUTPUT: H-Output-1
**
*Output, history, variable=PRESELECT
*End Step
** ----------------------------------------------------------------
**
** STEP: Step-SL
**
*Step, name=Step-SL, nlgeom=NO
*Static
1., 1., 1e-05, 1.
**
** LOADS
**
** Name: Load-S   Type: Surface traction
*Dsload
Surf-S, TRSHR, 10., 0., -1., 0.
**
** OUTPUT REQUESTS
**
*Restart, write, frequency=0
**
** FIELD OUTPUT: F-Output-1
**
*Output, field, variable=PRESELECT
**
** HISTORY OUTPUT: H-Output-1
**
*Output, history, variable=PRESELECT
*End Step
** ----------------------------------------------------------------
**
** STEP: Step-S
**
*Step, name=Step-S, nlgeom=NO
*Static
1., 1., 1e-05, 1.
**
** LOADS
**
** Name: Load-L   Type: Pressure
*Dsload, op=NEW
Surf-L, P, 10.
** Name: Load-S   Type: Surface traction
*Dsload, op=NEW
**
** OUTPUT REQUESTS
**
*Restart, write, frequency=0
**
** FIELD OUTPUT: F-Output-1
**
*Output, field, variable=PRESELECT
**
** HISTORY OUTPUT: H-Output-1
**
*Output, history, variable=PRESELECT
*End Step
