*Heading
** Job name: Job-chandou Model name: Model-1
** Generated by: Abaqus/CAE 2016
*Preprint, echo=NO, model=NO, history=NO, contact=NO
**
** PARTS
**
*Part, name=Part-chandou
*Node
      1,          50.,   682.492859,         670.
      2,          50.,    641.69281,         670.
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*Element, type=C3D8R
   1,  1725,  1836,   116,   117, 10774, 10885,  3490,  3491
   2,     4,   119,  1853,  1747,   442,  3468, 10902, 10796
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*Nset, nset=Set-1, generate
     1,  17602,      1
*Elset, elset=Set-1, generate
     1,  12472,      1
** Section: Section-1
*Solid Section, elset=Set-1, material=Material-1
,
*End Part
**
**
** ASSEMBLY
**
*Assembly, name=Assembly
**
*Instance, name=Part-chandou-1, part=Part-chandou
*End Instance
**
*Nset, nset=Set-Fix, instance=Part-chandou-1
   109,   110,  1648,  1649,  1650,  1651
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*Elset, elset=Set-Fix, instance=Part-chandou-1
 11918, 11922, 11923, 11928, 11932, 11943
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*End Assembly
**
** MATERIALS
**
*Material, name=Material-1
*Density
 7.8e-09,
*Elastic
210000., 0.3
**
** BOUNDARY CONDITIONS
**
** Name: BC-Fix Type: Symmetry/Antisymmetry/Encastre
*Boundary
Set-Fix, ENCASTRE
** ----------------------------------------------------------------
**
** STEP: Step-Freq
**
*Step, name=Step-Freq, nlgeom=NO, perturbation
*Frequency, eigensolver=Lanczos, sim=NO, acoustic coupling=on, normalization=displacement
30, , , , ,
**
** OUTPUT REQUESTS
**
*Restart, write, frequency=1
**
** FIELD OUTPUT: F-Output-1
**
*Output, field, variable=PRESELECT
*End Step
