*Heading
** Job name: Job-danke Model name: Model-1
** Generated by: Abaqus/CAE 2016
*Preprint, echo=NO, model=NO, history=NO, contact=NO
**
** PARTS
**
*Part, name=Part-danke
*Node
      1,          7.5,          80.,           0.
      2,          7.5,          95.,           0.
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*Element, type=S4R
  1,   1,  44, 361,  45
  2,  44,  43, 362, 361
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*Nset, nset=Set-1, generate
    1,  2287,     1
*Elset, elset=Set-1, generate
    1,  2268,     1
** Section: Section-1
*Shell Section, elset=Set-1, material=Material-1
1., 5
*End Part
**
**
** ASSEMBLY
**
*Assembly, name=Assembly
**
*Instance, name=Part-danke-1, part=Part-danke
*End Instance
**
*Nset, nset=Set-Fix, instance=Part-danke-1
    4,    5,    6,    8,  129,  130
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*Elset, elset=Set-Fix, instance=Part-danke-1
 1657, 1658, 1659, 1660, 1661, 1662
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*End Assembly
**
** MATERIALS
**
*Material, name=Material-1
*Density
 7.8e-09,
*Elastic
210000., 0.3
**
** BOUNDARY CONDITIONS
**
** Name: BC-Fix Type: Symmetry/Antisymmetry/Encastre
*Boundary
Set-Fix, ENCASTRE
** ----------------------------------------------------------------
**
** STEP: Step-Freq
**
*Step, name=Step-Freq, nlgeom=NO, perturbation
*Frequency, eigensolver=Lanczos, sim=NO, acoustic coupling=on, normalization=displacement
20, , , , ,
**
** OUTPUT REQUESTS
**
*Restart, write, frequency=0
**
** FIELD OUTPUT: F-Output-1
**
*Output, field, variable=PRESELECT
*End Step
