*Heading
** Job name: Job-guagou Model name: Model-1
** Generated by: Abaqus/CAE 2016
*Preprint, echo=NO, model=NO, history=NO, contact=NO
**
** PARTS
**
*Part, name=Part-guagou
*Node
      1,           0.,         -25.,           0.
      2,           0.,          15.,           0.
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*Element, type=C3D20R
   1,   131,   130,   238,   239,   604,   603,   711,   712,  7572,  7571,  7570,  7569,  7573,  7574,  7575,
       7576,  7578,  7577,  7579,  7580
   2,    86,   222,   223,    87,   559,   695,   696,   560,  7584,  7583,  7582,  7581,  7585,  7586,  7587,
       7588,  7590,  7589,  7591,  7592
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*Nset, nset=Set-1, generate
     1,  28679,      1
*Elset, elset=Set-1, generate
    1,  6060,     1
** Section: Section-1
*Solid Section, elset=Set-1, material=Material-1
,
*End Part
**
**
** ASSEMBLY
**
*Assembly, name=Assembly
**
*Instance, name=Part-guagou-1, part=Part-guagou
*End Instance
**
*Nset, nset=Set-Fix, instance=Part-guagou-1
     1,     2,    27,    28,    29,    30
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*Elset, elset=Set-Fix, instance=Part-guagou-1
   32,   33,   35,   37,   38,   39
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*Nset, nset=Set-Symm, instance=Part-guagou-1
  7096,  7097,  7098,  7099,  7100,  7101
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*Elset, elset=Set-Symm, instance=Part-guagou-1, generate
 5657,  6060,     1
*Elset, elset=_Surf-P_S5, internal, instance=Part-guagou-1
    8,  191,  412,  595,  816,  999
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*Elset, elset=_Surf-P_S3, internal, instance=Part-guagou-1
   83,  141,  146,  149,  487,  545
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*Surface, type=ELEMENT, name=Surf-P
_Surf-P_S5, S5
_Surf-P_S3, S3
*Elset, elset=_Surf-S_S4, internal, instance=Part-guagou-1
   16,   19,   24,   90,   92,  129
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*Elset, elset=_Surf-S_S6, internal, instance=Part-guagou-1
   96,   98,  102,  500,  502,  506
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*Surface, type=ELEMENT, name=Surf-S
_Surf-S_S4, S4
_Surf-S_S6, S6
*End Assembly
*Amplitude, name=Amp-1
             0.,              0.,             0.3,              2.,             0.5,              3.,              1.,              1.
**
** MATERIALS
**
*Material, name=Material-1
*Elastic
210000., 0.3
**
** BOUNDARY CONDITIONS
**
** Name: BC-2 Type: Symmetry/Antisymmetry/Encastre
*Boundary
Set-Symm, ZSYMM
** Name: BC-Fix Type: Symmetry/Antisymmetry/Encastre
*Boundary
Set-Fix, ENCASTRE
** ----------------------------------------------------------------
**
** STEP: Step-1
**
*Step, name=Step-1, nlgeom=NO
*Static
0.3, 1., 1e-05, 1.
**
** LOADS
**
** Name: Load-P   Type: Pressure
*Dsload, amplitude=Amp-1
Surf-P, P, 1000.
**
** OUTPUT REQUESTS
**
*Restart, write, frequency=0
**
** FIELD OUTPUT: F-Output-1
**
*Output, field
*Node Output
U,
*Element Output, directions=YES
S,
**
** HISTORY OUTPUT: H-Output-1
**
*Output, history, variable=PRESELECT
*End Step
** ----------------------------------------------------------------
**
** STEP: Step-2
**
*Step, name=Step-2, nlgeom=NO
*Static
1., 1., 1e-05, 1.
**
** LOADS
**
** Name: Load-S   Type: Surface traction
*Dsload
Surf-S, TRSHR, 20., 0., 1., 0.
**
** OUTPUT REQUESTS
**
*Restart, write, frequency=0
**
** FIELD OUTPUT: F-Output-1
**
*Output, field
*Node Output
U,
*Element Output, directions=YES
S,
**
** HISTORY OUTPUT: H-Output-1
**
*Output, history, variable=PRESELECT
*End Step
