*Heading
** Job name: Job-jiechu Model name: Model-1
** Generated by: Abaqus/CAE 2016
*Preprint, echo=NO, model=NO, history=NO, contact=NO
**
** PARTS
**
*Part, name=Part-ban
*Node
      1,          20.,          10.
      2,          19.,          10.
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*Element, type=CPS4R
  1,   1,   2,  43,  42
  2,   2,   3,  44,  43
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*Nset, nset=Set-1, generate
   1,  451,    1
*Elset, elset=Set-1, generate
   1,  400,    1
** Section: Section-1
*Solid Section, elset=Set-1, material=Material-1
,
*End Part
**
*Part, name=Part-pan
*End Part
**
**
** ASSEMBLY
**
*Assembly, name=Assembly
**
*Instance, name=Part-ban-1, part=Part-ban
*End Instance
**
*Instance, name=Part-pan-1, part=Part-pan
*Node
      1,  -9.18485047e-16,          20.,           0.
*Nset, nset=Part-pan-1-RefPt_, internal
1,
*Surface, type=SEGMENTS, name=Surf-pan
START,           0.,          10.
 CIRCL,          -5.,          15.,           0.,          15.
 CIRCL,           0.,          20.,           0.,          15.
 CIRCL,           5.,          15.,           0.,          15.
 CIRCL,           0.,          10.,           0.,          15.
*Rigid Body, ref node=Part-pan-1-RefPt_, analytical surface=Surf-pan
*End Instance
**
*Nset, nset=Set-Fix, instance=Part-ban-1, generate
 411,  451,    1
*Elset, elset=Set-Fix, instance=Part-ban-1, generate
 361,  400,    1
*Nset, nset=Set-Point, instance=Part-pan-1
 1,
*Elset, elset=_Surf-ban_S1, internal, instance=Part-ban-1, generate
  1,  40,   1
*Surface, type=ELEMENT, name=Surf-ban
_Surf-ban_S1, S1
*End Assembly
**
** MATERIALS
**
*Material, name=Material-1
*Elastic
210000., 0.3
**
** INTERACTION PROPERTIES
**
*Surface Interaction, name=IntProp-1
1.,
*Friction
0.,
**
** BOUNDARY CONDITIONS
**
** Name: BC-Fix Type: Symmetry/Antisymmetry/Encastre
*Boundary
Set-Fix, ENCASTRE
** Name: BC-Point Type: Displacement/Rotation
*Boundary
Set-Point, 1, 1
Set-Point, 6, 6
**
** INTERACTIONS
**
** Interaction: Int-1
*Contact Pair, interaction=IntProp-1, type=SURFACE TO SURFACE
Surf-ban, Part-pan-1.Surf-pan
** ----------------------------------------------------------------
**
** STEP: Step-10kN
**
*Step, name=Step-10kN, nlgeom=YES
*Static
1., 1., 1e-05, 1.
**
** LOADS
**
** Name: Load-point   Type: Concentrated force
*Cload
Set-Point, 2, -10.
**
** OUTPUT REQUESTS
**
*Restart, write, frequency=0
**
** FIELD OUTPUT: F-Output-1
**
*Output, field, variable=PRESELECT
**
** HISTORY OUTPUT: H-Output-1
**
*Output, history, variable=PRESELECT
*End Step
** ----------------------------------------------------------------
**
** STEP: Step-1000kN
**
*Step, name=Step-1000kN, nlgeom=YES
*Static
1., 1., 1e-05, 1.
**
** LOADS
**
** Name: Load-point   Type: Concentrated force
*Cload
Set-Point, 2, -100.
**
** OUTPUT REQUESTS
**
*Restart, write, frequency=0
**
** FIELD OUTPUT: F-Output-1
**
*Output, field, variable=PRESELECT
**
** HISTORY OUTPUT: H-Output-1
**
*Output, history, variable=PRESELECT
*End Step
