*Heading
** Job name: Job-luoxuanjiang Model name: Model-1
** Generated by: Abaqus/CAE 2016
*Preprint, echo=NO, model=NO, history=NO, contact=NO
**
** PARTS
**
*Part, name=Part-yepian
*Node
      1, -0.707106769,  0.707106769,           0.
      2,          -1.,           0.,           0.
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*Element, type=S4R
  1, 364, 123, 494, 417
  2, 165, 123, 247,  21
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*Nset, nset=Set-1, generate
   1,  577,    1
*Elset, elset=Set-1, generate
   1,  490,    1
** Section: Section-pian
*Shell Section, elset=Set-1, material=Material-1
0.5, 5
*End Part
**
*Part, name=Part-zhou
*Node
      1,  0.831469595,  0.555570245,           0.
      2,  0.555570245,  0.831469595,           0.
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*Element, type=C3D8R
    1,   169,   149,   194,   251,    30,    10,    55,   112
    2,   250,   193,   167,   148,   111,    54,    28,     9
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*Nset, nset=Set-1, generate
     1,  17514,      1
*Elset, elset=Set-1, generate
     1,  15250,      1
** Section: Section-zhou
*Solid Section, elset=Set-1, material=Material-1
,
*End Part
**
**
** ASSEMBLY
**
*Assembly, name=Assembly
**
*Instance, name=Part-yepian-1, part=Part-yepian
*End Instance
**
*Instance, name=Part-zhou-1, part=Part-zhou
*End Instance
**
*Node
      1,           0.,           0.,           0.
*Node
      2,           0.,          25.,           0.
*Node
      3,           0.,           0.,          25.
*Element, type=CONN3D2
1, 1, 3
*Connector Section, elset=Wire-1-Set-1
Beam,
"Datum csys-Hinge",
*Nset, nset=Set-RP-gan
 3,
*Nset, nset=Set-RP-yepian-Top
 2,
*Nset, nset=Set-gan, instance=Part-zhou-1, generate
     1,  17514,      1
*Elset, elset=Set-gan, instance=Part-zhou-1, generate
     1,  15250,      1
*Nset, nset=Set-yepian, instance=Part-yepian-1, generate
   1,  577,    1
*Elset, elset=Set-yepian, instance=Part-yepian-1, generate
   1,  490,    1
*Nset, nset=Set-yepian-center
 1,
*Nset, nset=Wire-1-Set-1
 1, 3
*Elset, elset=Wire-1-Set-1
 1,
*Orientation, name="Datum csys-Hinge"
          0.,           0.,           1.,           0.,           1.,           0.
1, 0.
** Constraint: Constraint-yepian
*Rigid Body, ref node=Set-RP-yepian-Top, elset=Set-yepian, tie nset=Set-yepian-center
** Constraint: Constraint-zhou
*Rigid Body, ref node=Set-RP-gan, elset=Set-gan
*End Assembly
**
** MATERIALS
**
*Material, name=Material-1
*Elastic
210000., 0.3
**
** BOUNDARY CONDITIONS
**
** Name: BC-gan Type: Symmetry/Antisymmetry/Encastre
*Boundary
Set-RP-gan, ENCASTRE
** ----------------------------------------------------------------
**
** STEP: Step-1
**
*Step, name=Step-1, nlgeom=YES
*Static
0.1, 1., 1e-06, 0.1
**
** BOUNDARY CONDITIONS
**
** Name: BC-pian Type: Displacement/Rotation
*Boundary
Set-RP-yepian-Top, 1, 1, 1.
**
** OUTPUT REQUESTS
**
*Restart, write, frequency=0
**
** FIELD OUTPUT: F-Output-1
**
*Output, field, variable=PRESELECT
**
** HISTORY OUTPUT: H-Output-1
**
*Output, history
*Node Output, nset=Wire-1-Set-1
U1, U2, U3, UR1, UR2, UR3
*Element Output, elset=Wire-1-Set-1
CTF1, CTF2, CTF3, CTM1, CTM2, CTM3, CU1, CU2, CU3, CUR1, CUR2, CUR3
*End Step
