*Heading
** Job name: Job-tiegui Model name: Model-1
** Generated by: Abaqus/CAE 2016
*Preprint, echo=NO, model=NO, history=NO, contact=NO
**
** PARTS
**
*Part, name=Part-tiegui
*Node
      1,           0.,           0.,           0.
      2,           0.,         120.,           0.
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*Element, type=C3D20R
   1,   83,   73,   74,   82,  184,  174,  175,  183, 1721, 1720, 1719, 1718, 1722, 1723, 1724,
      1725, 1727, 1726, 1728, 1729
   2,   65,   22,   21,   53,  166,  123,  122,  154, 1733, 1732, 1731, 1730, 1734, 1735, 1736,
      1737, 1739, 1738, 1740, 1741
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*Nset, nset=Set-1, generate
    1,  6291,     1
*Elset, elset=Set-1, generate
    1,  1184,     1
** Section: Section-1
*Solid Section, elset=Set-1, material=Material-1
,
*End Part
**
**
** ASSEMBLY
**
*Assembly, name=Assembly
**
*Instance, name=Part-tiegui-1, part=Part-tiegui
*End Instance
**
*Nset, nset=Set-3, instance=Part-tiegui-1, generate
    1,  6291,     1
*Elset, elset=Set-3, instance=Part-tiegui-1, generate
    1,  1184,     1
*Nset, nset=Set-Fix, instance=Part-tiegui-1
    1,    8,   46,   47,   48,   49
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*Elset, elset=Set-Fix, instance=Part-tiegui-1
    4,    6,   31,   34,   36,   37
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*Nset, nset=Set-Symm, instance=Part-tiegui-1
    1,    2,    9,   10,   11,   12
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*Elset, elset=Set-Symm, instance=Part-tiegui-1
    2,    7,    8,   12,   14,   16
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*End Assembly
**
** MATERIALS
**
*Material, name=Material-1
*Elastic
210000., 0.3
*Expansion
 1.18e-05,
**
** BOUNDARY CONDITIONS
**
** Name: BC-Fix Type: Symmetry/Antisymmetry/Encastre
*Boundary
Set-Fix, ENCASTRE
** Name: BC-Symm Type: Symmetry/Antisymmetry/Encastre
*Boundary
Set-Symm, ZSYMM
**
** PREDEFINED FIELDS
**
** Name: Predefined Field-1   Type: Temperature
*Initial Conditions, type=TEMPERATURE
Set-3, 15.
** ----------------------------------------------------------------
**
** STEP: Step-1
**
*Step, name=Step-1, nlgeom=NO
*Static
1., 1., 1e-05, 1.
**
** PREDEFINED FIELDS
**
** Name: Predefined Field-1   Type: Temperature
*Temperature
Set-3, 45.
**
** OUTPUT REQUESTS
**
*Restart, write, frequency=0
**
** FIELD OUTPUT: F-Output-1
**
*Output, field, variable=PRESELECT
**
** HISTORY OUTPUT: H-Output-1
**
*Output, history, variable=PRESELECT
*End Step
