*Heading
** Job name: Job-zhijia Model name: Model-1
** Generated by: Abaqus/CAE 2016
*Preprint, echo=NO, model=NO, history=NO, contact=NO
**
** PARTS
**
*Part, name=Part-zhijia
*Node
      1,           0.,         3.75,           0.
      2,          15.,         3.75,           0.
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*Element, type=C3D20R
   1,    34,    33,   401,   408,   958,   957,  2240,  2247,  5658,  5657,  5656,  5655,  5659,  5660,  5661,
       5662,  5664,  5663,  5665,  5666
   2,    41,   363,   364,    42,   849,  2202,  2203,   848,  5670,  5669,  5668,  5667,  5671,  5672,  5673,
       5674,  5676,  5675,  5677,  5678
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*Nset, nset=Set-1, generate
     1,  21442,      1
*Elset, elset=Set-1, generate
    1,  4550,     1
** Section: Section-1
*Solid Section, elset=Set-1, material=Material-1
,
*End Part
**
**
** ASSEMBLY
**
*Assembly, name=Assembly
**
*Instance, name=Part-zhijia-1, part=Part-zhijia
*End Instance
**
*Nset, nset=Set-Fix, instance=Part-zhijia-1
     5,     6,     9,    10,    68,    69
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*Elset, elset=Set-Fix, instance=Part-zhijia-1
   41,   46,   47,   48,   50,   51
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*Nset, nset=Set-HT, instance=Part-zhijia-1
     1,     2,     7,     8,    13,    14
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*Elset, elset=Set-HT, instance=Part-zhijia-1, generate
 2861,  4550,     1
*Nset, nset=Set-LT, instance=Part-zhijia-1
     1,     2,     3,     4,     5,     6
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*Elset, elset=Set-LT, instance=Part-zhijia-1, generate
    1,  2860,     1
*Nset, nset=Set-Symm, instance=Part-zhijia-1
     1,     6,     8,     9,    13,    22
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*Elset, elset=Set-Symm, instance=Part-zhijia-1
    5,    6,    8,   10,   11,   29
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*Elset, elset=_Surf-Load_S6, internal, instance=Part-zhijia-1
 2892, 2893, 2899, 3061, 3062, 3068
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*Elset, elset=_Surf-Load_S4, internal, instance=Part-zhijia-1
 2895, 2896, 3064, 3065, 3233, 3234
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*Surface, type=ELEMENT, name=Surf-Load
_Surf-Load_S6, S6
_Surf-Load_S4, S4
*End Assembly
**
** MATERIALS
**
*Material, name=Material-1
*Elastic
210000., 0.3
*Expansion
 1.18e-05,
**
** BOUNDARY CONDITIONS
**
** Name: BC-Fix Type: Symmetry/Antisymmetry/Encastre
*Boundary
Set-Fix, ENCASTRE
** Name: BC-Symm Type: Symmetry/Antisymmetry/Encastre
*Boundary
Set-Symm, ZSYMM
**
** PREDEFINED FIELDS
**
** Name: Predefined Field-1   Type: Temperature
*Initial Conditions, type=TEMPERATURE
Set-HT, 15.
** Name: Predefined Field-2   Type: Temperature
*Initial Conditions, type=TEMPERATURE
Set-LT, 15.
** ----------------------------------------------------------------
**
** STEP: Step-15-30
**
*Step, name=Step-15-30, nlgeom=NO
*Static
1., 1., 1e-05, 1.
**
** LOADS
**
** Name: Load-Surf   Type: Surface traction
*Dsload
Surf-Load, TRSHR, 30., 1., 0., 0.
**
** OUTPUT REQUESTS
**
*Restart, write, frequency=0
**
** FIELD OUTPUT: F-Output-1
**
*Output, field, variable=PRESELECT
**
** HISTORY OUTPUT: H-Output-1
**
*Output, history, variable=PRESELECT
*End Step
** ----------------------------------------------------------------
**
** STEP: Step-90-30
**
*Step, name=Step-90-30, nlgeom=NO
*Static
1., 1., 1e-05, 1.
**
** PREDEFINED FIELDS
**
** Name: Predefined Field-1   Type: Temperature
*Temperature
Set-HT, 90.
**
** OUTPUT REQUESTS
**
*Restart, write, frequency=0
**
** FIELD OUTPUT: F-Output-1
**
*Output, field, variable=PRESELECT
**
** HISTORY OUTPUT: H-Output-1
**
*Output, history, variable=PRESELECT
*End Step
** ----------------------------------------------------------------
**
** STEP: Step-90
**
*Step, name=Step-90, nlgeom=NO
*Static
1., 1., 1e-05, 1.
**
** LOADS
**
** Name: Load-Surf   Type: Surface traction
*Dsload, op=NEW
**
** OUTPUT REQUESTS
**
*Restart, write, frequency=0
**
** FIELD OUTPUT: F-Output-1
**
*Output, field, variable=PRESELECT
**
** HISTORY OUTPUT: H-Output-1
**
*Output, history, variable=PRESELECT
*End Step
